Simulations: Version=216
  Simulation
    Clock: Start=1950-01-01; End=2000-12-31
    Summary
    Weather: FileName=%root%/Examples/WeatherFiles/AU_Dalby.met
    SoilArbitrator
    MicroClimate: a_interception=0; b_interception=1; c_interception=0; d_interception=0; SoilHeatFluxFraction=0.4; MinimumHeightDiffForNewLayer=0; NightInterceptionFraction=0.5; ReferenceHeight=2
    Zone Field: Area=1; Slope=0; AspectAngle=0; Altitude=50
      Report
        VariableNames:
          [Wheat].Grain.Total.Wt as WheatYield
          [Canola].Grain.Total.Wt as CanolaYield
          [Oats].Grain.Total.Wt as OatsYield
          [Soybean].Grain.Total.Wt as SoybeanYield
          [Chickpea].Grain.Total.Wt as ChickpeaYield
          [Barley].Grain.Total.Wt as BarleyYield
          sum([Nutrient].Organic.C) as OrganicC
          [RotationManager].Script.RainSinceHarvest as Rain
          [Clock].Today as Date
        EventNames:
          [Wheat].Harvesting
          [Canola].Harvesting
          [Oats].Harvesting
          [Soybean].Harvesting
          [Chickpea].Harvesting
          [Barley].Harvesting
      Fertiliser
      Soil: ASCOrder=Vertosol; ASCSubOrder=Black; SoilType=Clay; Site=Norwin; NearestTown=Norwin; Region=Darling Downs and Granite Belt; State=Queensland; Country=Australia; NaturalVegetation=Qld. Bluegrass, possible Qld. Blue gum; ApsoilNumber=900; Latitude=-27.581836; Longitude=151.320206; LocationAccuracy=+/- 20m; YearOfSampling=0
        DataSource=CSIRO Sustainable Ecosystems, Toowoomba; Characteriesd as part of the GRDC funded project"Doing it better, doing it smarter, managing soil water in Australian agriculture' 2011
        Comments=Clay - OC, CLL for all crops estimated-based on Bongeen Mywybilla Soil No1
        Physical
          Thickness  BD       AirDry    LL15   DUL       SAT       KS
          150        1.01056  0.13025   0.261  0.521     0.588655  20
          150        1.07146  0.198689  0.248  0.496723  0.565677  20
          300        1.09394  0.28      0.28   0.488438  0.557193  20
          300        1.15861  0.28      0.28   0.480297  0.532787  20
          300        1.17301  0.28      0.28   0.471584  0.527354  20
          300        1.16287  0.28      0.28   0.457071  0.53118   20
          300        1.1875   0.28      0.28   0.452332  0.521888  20
          SoilCrop WheatSoil: LL=[0.261, 0.248, 0.28, 0.306, 0.36, 0.392, 0.446]; KL=[0.06, 0.06, 0.06, 0.04, 0.04, 0.02, 0.01]; XF=[1, 1, 1, 1, 1, 1, 1]
          SoilCrop ChickpeaSoil: LL=[0.261, 0.248, 0.28, 0.28, 0.28, 0.28, 0.28]; KL=[0.045, 0.045, 0.045, 0.03, 0.025, 0.02, 0.01]; XF=[1, 1, 1, 1, 1, 1, 1]
          SoilCrop OatsSoil: LL=[0.261, 0.248, 0.28, 0.306, 0.36, 0.392, 0.446]; KL=[0.06, 0.06, 0.06, 0.04, 0.04, 0.02, 0.01]; XF=[1, 1, 1, 1, 1, 1, 1]
          SoilCrop SoybeanSoil: LL=[0.261, 0.248, 0.28, 0.306, 0.36, 0.392, 0.446]; KL=[0.06, 0.06, 0.06, 0.04, 0.04, 0.02, 0.01]; XF=[1, 1, 1, 1, 1, 1, 1]
          SoilCrop BarleySoil: LL=[0.261, 0.248, 0.28, 0.306, 0.36, 0.392, 0.446]; KL=[0.06, 0.06, 0.06, 0.04, 0.04, 0.02, 0.01]; XF=[1, 1, 1, 1, 1, 1, 1]
          SoilCrop CanolaSoil: LL=[0.261, 0.248, 0.28, 0.28, 0.28, 0.28, 0.28]; KL=[0.06, 0.05, 0.05, 0.04, 0.04, 0.04, 0.04]; XF=[1, 1, 1, 1, 1, 1, 1]
        WaterBalance SoilWater: SummerDate=1-Nov; SummerU=5; SummerCona=5; WinterDate=1-Apr; WinterU=5; WinterCona=5; DiffusConst=40; DiffusSlope=16; Salb=0.12; CN2Bare=73; CNRed=20; CNCov=0.8; PSIDul=-100; Thickness=[150, 150, 300, 300, 300, 300, 300]; SWCON=[0.3, 0.3, 0.3, 0.3, 0.3, 0.3, 0.3]
        Organic: FOMCNRatio=40; CarbonUnits=Total
          Thickness  Carbon  SoilCNRatio  FBiom  FInert  FOM
          150        1.2     12           0.04   0.4     347.129
          150        0.96    12           0.02   0.6     270.344
          300        0.6     12           0.02   0.8     163.972
          300        0.3     12           0.02   1       99.4541
          300        0.18    12           0.01   1       60.322
          300        0.12    12           0.01   1       36.5871
          300        0.12    12           0.01   1       22.1912
        Chemical: Thickness=[150, 150, 300, 300, 300, 300, 300]; PH=[8, 8, 8, 8, 8, 8, 8]; PHUnits=Water
        Water: Thickness=[150, 150, 300, 300, 300, 300, 300]; FilledFromTop=false
          InitialValues=[0.521, 0.496723, 0.488438, 0.480297, 0.471584, 0.457071, 0.452332]
        Nutrient
        Solute NO3: Thickness=[150, 150, 300, 300, 300, 300, 300]; InitialValues=[1, 1, 1, 1, 1, 1, 1]; InitialValuesUnits=ppm; WaterTableConcentration=0; D0=0; DepthConstant=0; MaxDepthSoluteAccessible=0; RunoffEffectivenessAtMovingSolute=0; MaxEffectiveRunoff=0
        Solute NH4: Thickness=[150, 150, 300, 300, 300, 300, 300]; InitialValues=[0.1, 0.1, 0.1, 0.1, 0.1, 0.1, 0.1]; InitialValuesUnits=ppm; WaterTableConcentration=0; D0=0; DepthConstant=0; MaxDepthSoluteAccessible=0; RunoffEffectivenessAtMovingSolute=0; MaxEffectiveRunoff=0
        Solute Urea: Thickness=[150, 150, 300, 300, 300, 300, 300]; InitialValues=[0, 0, 0, 0, 0, 0, 0]; InitialValuesUnits=kg/ha; WaterTableConcentration=0; D0=0; DepthConstant=0; MaxDepthSoluteAccessible=0; RunoffEffectivenessAtMovingSolute=0; MaxEffectiveRunoff=0
        SoilTemperature Temperature: InteractionsPerDay=8
      SurfaceOrganicMatter: InitialResidueName=wheat_stubble; InitialResidueType=wheat; InitialResidueMass=500; InitialStandingFraction=0; InitialCPR=0; InitialCNR=100
      Manager Sow using a variable rule (disabled)
        Crop = [Wheat]
        StartDate = 1-may
        EndDate = 10-jul
        MinESW = 100
        MinRain = 25
        RainDays = 7
        CultivarName = Hartog
        SowingDepth = 30
        RowSpacing = 250
        Population = 120
```csharp
using System;
using Models.Core;
using Models.PMF;
using System.Linq;

// This prints a message to the APSIM run log
Console.WriteLine("Available Cultivars for Wheat: " + string.Join(", ", Wheat.CultivarNames));
```
      Manager RotationManager
        CropSequence = Wheat, Chickpea, Canola, Oats, Soybean, Barley
```csharp
using System;
using System.Linq;
using Models.Core;
using Models.PMF;

namespace Models
{
    [Serializable]
    public class Script : Model
    {
        [Link] private Clock clock;
        [Link] private Fertiliser fertiliser;
        [Link] private Zone paddock;
        [Link] private Models.Climate.Weather weather;

        public double RainSinceHarvest { get; set; } = 0;

        [EventSubscribe("DoDailyInitialisation")]
        private void OnDaily(object sender, EventArgs e)
        {
            if (weather != null) RainSinceHarvest += weather.Rain;
        }

        [Description("List of crops to rotate through, separated by commas")]
        public string CropSequence { get; set; } = "Wheat, Canola, Barley, Soybean, Oats, Chickpea";

        private string[] rotationArray;
        private int currentIndex = 0;
        private Plant currentGrowingCrop = null;

        [EventSubscribe("Commencing")]
        private void OnCommencing(object sender, EventArgs e)
        {
            rotationArray = CropSequence.Split(new[] { ',' }, StringSplitOptions.RemoveEmptyEntries)
                                        .Select(c => c.Trim())
                                        .ToArray();
            currentIndex = 0;
        }

        [EventSubscribe("DoManagement")]
        private void OnDoManagement(object sender, EventArgs e)
        {
            if (rotationArray == null || rotationArray.Length == 0) return;
            string cropToSow = rotationArray[currentIndex];
            bool isSummerCrop = cropToSow.Equals("Soybean", StringComparison.OrdinalIgnoreCase);
            int targetMonth = isSummerCrop ? 11 : 5;
            int cleanMonth = isSummerCrop ? 10 : 4;

            // 1. Clean up dead crops before they freeze the rotation (End of April/Oct)
            if (currentGrowingCrop != null && (!currentGrowingCrop.IsAlive || (clock.Today.Month == cleanMonth && clock.Today.Day == 30)))
            {
                try { if (currentGrowingCrop.IsAlive) currentGrowingCrop.EndCrop(); } catch { }
                currentGrowingCrop = null;
                RainSinceHarvest = 0;
                currentIndex++;
                if (currentIndex >= rotationArray.Length) currentIndex = 0;
            }

            // 2. If a crop is currently growing normally
            if (currentGrowingCrop != null && currentGrowingCrop.IsAlive)
            {
                if (currentGrowingCrop.IsReadyForHarvesting)
                {
                    try { currentGrowingCrop.Harvest(); } catch (Exception ex) { Console.WriteLine($"Harvest failed: {ex.Message}"); }
                    try { if (currentGrowingCrop.IsAlive) currentGrowingCrop.EndCrop(); } catch (Exception ex) { Console.WriteLine($"EndCrop failed: {ex.Message}"); }
                    currentGrowingCrop = null;
                    RainSinceHarvest = 0;
                    
                    // Advance rotation
                    currentIndex++;
                    if (currentIndex >= rotationArray.Length) currentIndex = 0;
                }
                return;
            }

            // 3. Sowing logic: Sow Winter crops in May, Summer crops in Nov
            if (currentGrowingCrop == null && clock.Today.Month == targetMonth && clock.Today.Day == 15)
            {
                Plant plantToSow = paddock.Children.OfType<Plant>()
                    .FirstOrDefault(p => p.Name.Equals(cropToSow, StringComparison.OrdinalIgnoreCase));

                bool sowSuccess = false;
                if (plantToSow != null)
                {
                    try
                    {
                        string cultivar = GetCultivar(plantToSow);
                        plantToSow.Sow(cultivar: cultivar, population: 100, depth: 30, rowSpacing: 250);
                        currentGrowingCrop = plantToSow;
                        sowSuccess = true;

                        // Apply N Fertiliser at sowing (excluding nitrogen-fixing legumes)
                        // fertiliser.Apply(amount: 80, type: "Urea");
                    }
                    catch (Exception ex)
                    {
                        Console.WriteLine($"Sow failed for {cropToSow}: {ex.Message}. Skipping crop.");
                        try { if (plantToSow.IsAlive) plantToSow.EndCrop(); } catch { }
                    }
                }

                if (!sowSuccess)
                {
                    currentIndex++;
                    if (currentIndex >= rotationArray.Length) currentIndex = 0;
                }
            }
        }

        private string GetCultivar(Plant plant)
        {
            if (plant?.CultivarNames == null || !plant.CultivarNames.Any()) return "Default";
            string n = plant.Name.ToLower();
            if (n.Contains("wheat")) return plant.CultivarNames.FirstOrDefault(c => c.ToLower().Contains("hartog")) ?? plant.CultivarNames.First();
            if (n.Contains("chickpea")) return plant.CultivarNames.FirstOrDefault(c => c.ToLower().Contains("ambar")) ?? plant.CultivarNames.First();
            if (n.Contains("barley")) return plant.CultivarNames.FirstOrDefault(c => c.ToLower().Contains("commander")) ?? plant.CultivarNames.First();
            if (n.Contains("oats")) return plant.CultivarNames.FirstOrDefault(c => c.ToLower().Contains("balgowan")) ?? plant.CultivarNames.First();
            if (n.Contains("soybean")) return plant.CultivarNames.FirstOrDefault(c => c.ToLower().Contains("a6785")) ?? plant.CultivarNames.First();
            if (n.Contains("canola")) return plant.CultivarNames.FirstOrDefault(c => c.ToLower().Contains("outback")) ?? plant.CultivarNames.First();
            var safe = plant.CultivarNames.FirstOrDefault(c => !c.Equals("Default", StringComparison.OrdinalIgnoreCase));
            return safe ?? plant.CultivarNames.First();
        }
    }
}
```
      Manager Harvest (disabled)
        Crop = [Wheat]
```csharp
using APSIM.Shared.Utilities;
using Models.Utilities;
using Models.Soils;
using Models.PMF;
using Models.Core;
using System;
using System.Linq;

namespace Models
{
    [Serializable] 
    public class Script : Model
    {
        [Description("Crop")]
        public IPlant Crop { get; set; }
        
        [EventSubscribe("DoManagement")]
        private void OnDoManagement(object sender, EventArgs e)
        {
            if (Crop.IsReadyForHarvesting)
            {
                Crop.Harvest();
                Crop.EndCrop();
            }
        }
    }
}
```
      Plant Barley
      Plant Soybean
      Plant Oats
      Plant Chickpea
      Plant Wheat
      Plant Canola
  DataStore
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